###############
# Micro Units #
###############

################################################

variable 			R_min equal 205/2
variable 			R_max equal 3000/2

################################################

variable 			r0 equal 205/2
variable 			r1 equal 375/2
variable 			r2 equal 750/2
variable 			r3 equal 1500/2
variable 			r4 equal 3000/2

################################################
###################################################################################################

### Initialization

# log name
variable 			log_name string log1.liggghts

# Variables, paso de si a micro

# Cylinder wall dimensions
variable 			cylin_radio equal 0.011e6

# Youngs Modulus, para la conversion: multiplicar GPa por 10^-3
variable 			E_MgO equal 2.5e5 # antes e5
variable 			E_Al2O3 equal 2.5e5 # antes e5

# Cohesion Energy Density
variable 			CED_MgO equal 3000000e-3
variable 			CED_Al2O3 equal 3000000e-3

# Spheres
variable 			rho_MgO equal 3500e-3
variable 			rho_Al2O3 equal 3000e-3
variable 			nu_Al2O3 equal 0.25
variable 			nu_MgO equal 0.25

# Neighbor extra distance beyond force cutoff
variable 			skin equal 2*${R_min}

# Dimensiones plato
variable 			radio equal 0.011e6
variable 			h_plato equal 0.008e6

# Dimensiones fabrica de particulas
variable 			z_lo2 equal ${R_max}
variable 			z_hi2 equal ${z_lo2}+(${radio}^2*${h_plato})/((${radio}-${R_max})^2)
variable 			z_prensa equal ceil((${z_hi2}+${R_max})/1000)
variable 			R_in equal ${radio}-${R_max}

# Dimensiones dominio
variable 			dom_radio equal 0.0155e6
variable 			zlo equal -0.001e6
#variable 			zhi equal ${z_prensa}+0.005e6
variable 			zhi equal 0.025e6

# Plato
variable 			scale equal 1e3

# Fuerza tope para la prensa rapida [N]
variable 			target_force equal 10000  # 10 kN

# Gravedad
variable 			gravity equal 9.81e-6

# Shear modulus
variable 			shear_modulus equal ${E_Al2O3}/(2*(1+${nu_Al2O3}))

# Rayleigh time [microseconds]
variable 			rayleigh_time equal 3.141592*${R_min}*(sqrt(${rho_Al2O3}/${shear_modulus})/(0.1631*${nu_Al2O3}+0.8766))

# TimeStep
variable 			timestep equal 0.3*${rayleigh_time}
print ${timestep}

# Velocidad prensa rapida
variable 			velRapida equal -0.3
# Altura prensa rapida [mm]
variable 			h_prensaRapida equal 13
# Tiempo en microsegundos hasta llegar a 8mm de altura
variable 			t_prensaRapida equal ((${h_prensaRapida}*10^3)-${h_plato})/abs(${velRapida})


# El numero de timestep equivalentes a un segundo
variable 			s_enTimeSteps equal 1e6/${timestep}

# Dump every ...
variable 			100fps equal ceil(${s_enTimeSteps}/100)
variable 			1000fps equal ceil(${s_enTimeSteps}/1000)


###########################################################
# Cuantos segundos dura la simulacion?
variable 			runUpTo1 equal ceil(10*${s_enTimeSteps})
# Procentaje en volumen de insercion en factory2
variable 			per equal 0.7
###########################################################


# Preliminaries
units				micro
atom_style			sphere
atom_modify			map array
boundary 			f f f
newton 				off
communicate			single vel yes
processors			* * 1   # Un solo nivel, los procesadores se reparten el domino en el plano XY

# Declare domain
region				domain cylinder z 0 0 ${dom_radio} ${zlo} ${zhi} units box
create_box 			2 domain

# log name
log 				${log_name} append

# Neighbor listing
neighbor 			${skin} bin
neigh_modify		delay 0


### Setup
# Material and interaction properties required
fix 				m1 all property/global youngsModulus peratomtype ${E_MgO} ${E_Al2O3}
fix 				m2 all property/global poissonsRatio peratomtype ${nu_MgO} ${nu_Al2O3}
fix 				m3 all property/global coefficientRestitution peratomtypepair 2 0.5 0.5 0.5 0.5
fix 				m4 all property/global coefficientFriction peratomtypepair 2 0.2 0.175 0.175 0.5
fix 				m6 all property/global cohesionEnergyDensity peratomtypepair 2 ${CED_MgO} ${CED_Al2O3} ${CED_Al2O3} ${CED_MgO}


# Particle insertion
###################################################################################################
##########################
# Uniform mass insertion #
##########################

fix pts0 all particletemplate/sphere 1 atom_type 1 density constant ${rho_MgO} radius constant ${r0}
fix pts2 all particletemplate/sphere 1 atom_type 1 density constant ${rho_MgO} radius constant ${r1}
fix pts4 all particletemplate/sphere 1 atom_type 1 density constant ${rho_MgO} radius constant ${r2}
fix pts6 all particletemplate/sphere 1 atom_type 1 density constant ${rho_MgO} radius constant ${r3}
fix pts8 all particletemplate/sphere 1 atom_type 1 density constant ${rho_MgO} radius constant ${r4}

fix pts1 all particletemplate/sphere 1 atom_type 2 density constant ${rho_Al2O3} radius constant ${r0}
fix pts3 all particletemplate/sphere 1 atom_type 2 density constant ${rho_Al2O3} radius constant ${r1}
fix pts5 all particletemplate/sphere 1 atom_type 2 density constant ${rho_Al2O3} radius constant ${r2}
fix pts7 all particletemplate/sphere 1 atom_type 2 density constant ${rho_Al2O3} radius constant ${r3}
fix pts9 all particletemplate/sphere 1 atom_type 2 density constant ${rho_Al2O3} radius constant ${r4}

fix pdd2 all particledistribution/discrete 5430 10 pts0 0.0515 pts1 0.0009 pts2 0.0523 pts3 0.0001 pts4 0.089 pts5 0.0002 pts6 0.253 pts7 0.0005 pts8 0.21 pts9 0.0005

###################################################################################################

# Fabricas de particulas
region 				factory2 cylinder z 0 0 ${R_in} ${z_lo2} ${z_hi2} units box

fix 				ins2 all insert/pack seed 1001 distributiontemplate pdd2 insert_every once overlapcheck yes maxattempt 1000 volumefraction_region ${per} region factory2 ntry_mc 1000000


# Import mesh from cad:
fix 				cad1 all mesh/surface file meshes/plato_8mm_22mm.stl type 1 scale ${scale}
fix 				prensa all mesh/surface/stress file meshes/prensa_22mm_${z_prensa}.stl type 1 scale ${scale} stress on
fix 				move all move/mesh mesh prensa linear 0. 0. ${velRapida}

# Fuerzas sobre la cara de la prensa
# Paso de fuerza en unidades micro a si -> 1*10^-6
variable 			ForceX equal ceil(f_prensa[1]*1e-6)
variable 			ForceY equal ceil(f_prensa[2]*1e-6)
variable 			ForceZ equal ceil(f_prensa[3]*1e-6)


# Use the imported mesh as granular wall
fix 				granwalls all wall/gran model hertz tangential history  mesh n_meshes 2 meshes cad1 prensa

# Cylinder wall
fix 				cylinder_wall all wall/gran model hertz tangential history primitive type 1 zcylinder ${cylin_radio} 0 0

# Define the physics
pair_style 			gran model hertz tangential history cohesion sjkr
pair_coeff			* *

# Integrator
fix					integrate all nve/sphere
# Gravity
fix 				grav all gravity ${gravity} vector 0.0 0.0 -1.0

# Time step
timestep 			${timestep}
# Thermodynamic output settings
thermo_style		custom step atoms ke time cpu
thermo 				1000
thermo_modify 		norm no lost ignore  # ignora los atomos perdidos

# Documento restart; siempre el mismo archivo, sobreescribiendose
#restart 			${1000fps} poly.restart poly.restart
restart 			${1000fps} poly.restart poly.restart

# Check time step and initialize dump file
fix 				ctg all check/timestep/gran 1000 0.2 0.2  # antes en vez de 1000 habia un 1 (de solo comprobar una vez)
run 1
#unfix				ctg

#dump commands
dump				dmp all custom ${1000fps} post/dump*.pruebas id type x y z ix iy iz vx vy vz fx fy fz omegax omegay omegaz radius mass
fix 				dumpText all print 10 "${ForceX} ${ForceY} ${ForceZ}" screen no title "Fx[N] Fy[N] Fz[N]" file fuerzasPrensa1.txt
dump 				dmpstl all mesh/stl ${1000fps} post/dump*.stl

#run

run 				${runUpTo1} every 100 "if '${ForceZ}>${target_force}' then quit"
